// COMSOL Multiphysics 6.4.0.429 model "LEG3D_Fracture_Dipole_Cole.mph"
// Outline of the model tree

Parameters
  I = 0.005[A]
  BoneMarrow_epsilonr = real(2.5+(3/(1+(j*2*pi*freq*0.000000000007958)^(1-0.2)))+(25/(1+(j*2*pi*freq*0.000000015915)^(1-0.1)))+(5000/(1+(j*2*pi*freq*0.001591549)^(1-0.1)))+(2000000/(1+(j*2*pi*freq*0.015915)^(1-0.1)))+(0.001/(j*2*pi*freq*epsilon0_const)))
  BoneMarrow_sigma = -2*pi*freq*epsilon0_const*imag(2.5+(3/(1+(j*2*pi*freq*0.000000000007958)^(1-0.2)))+(25/(1+(j*2*pi*freq*0.000000015915)^(1-0.1)))+(5000/(1+(j*2*pi*freq*0.001591549)^(1-0.1)))+(2000000/(1+(j*2*pi*freq*0.015915)^(1-0.1)))+(0.001/(j*2*pi*freq*epsilon0_const)))
  BoneCortical_epsilonr = real(2.5+(10/(1+(j*2*pi*freq*0.000000000013263)^(1-0.2)))+(180/(1+(j*2*pi*freq*0.000000079577)^(1-0.2)))+(5000/(1+(j*2*pi*freq*0.000159155)^(1-0.2)))+(100000/(1+(j*2*pi*freq*0.015915)^(1-0)))+(0.02/(j*2*pi*freq*epsilon0_const)))
  BoneCortical_sigma = -2*pi*freq*epsilon0_const*imag(2.5+(10/(1+(j*2*pi*freq*0.000000000013263)^(1-0.2)))+(180/(1+(j*2*pi*freq*0.000000079577)^(1-0.2)))+(5000/(1+(j*2*pi*freq*0.000159155)^(1-0.2)))+(100000/(1+(j*2*pi*freq*0.015915)^(1-0)))+(0.02/(j*2*pi*freq*epsilon0_const)))
  Muscle_epsilonr = real(4+(50/(1+(j*2*pi*freq*0.000000000007234)^(1-0.1)))+(7000/(1+(j*2*pi*freq*0.000000353678)^(1-0.1)))+(1200000/(1+(j*2*pi*freq*0.00031831)^(1-0.1)))+(25000000/(1+(j*2*pi*freq*0.002274)^(1-0)))+(0.2/(j*2*pi*freq*epsilon0_const)))
  Muscle_sigma = -2*pi*freq*epsilon0_const*imag(4+(50/(1+(j*2*pi*freq*0.000000000007234)^(1-0.1)))+(7000/(1+(j*2*pi*freq*0.000000353678)^(1-0.1)))+(1200000/(1+(j*2*pi*freq*0.00031831)^(1-0.1)))+(25000000/(1+(j*2*pi*freq*0.002274)^(1-0)))+(0.2/(j*2*pi*freq*epsilon0_const)))
  Fat_epsilonr = real(2.5+(3/(1+(j*2*pi*freq*0.000000000007958)^(1-0.2)))+(15/(1+(j*2*pi*freq*0.000000015915)^(1-0.1)))+(33000/(1+(j*2*pi*freq*0.000159155)^(1-0.05)))+(10000000/(1+(j*2*pi*freq*0.007958)^(1-0.01)))+(0.01/(j*2*pi*freq*epsilon0_const)))
  Fat_sigma = -2*pi*freq*epsilon0_const*imag(2.5+(3/(1+(j*2*pi*freq*0.000000000007958)^(1-0.2)))+(15/(1+(j*2*pi*freq*0.000000015915)^(1-0.1)))+(33000/(1+(j*2*pi*freq*0.000159155)^(1-0.05)))+(10000000/(1+(j*2*pi*freq*0.007958)^(1-0.01)))+(0.01/(j*2*pi*freq*epsilon0_const)))
  Skin_epsilonr = real(4+(32/(1+(j*2*pi*freq*0.000000000007234)^(1-0)))+(1100/(1+(j*2*pi*freq*0.000000032481)^(1-0.2)))+(0/(1+(j*2*pi*freq*0.000159155)^(1-0.2)))+(0/(1+(j*2*pi*freq*0.015915)^(1-0.2)))+(0.0002/(j*2*pi*freq*epsilon0_const)))
  Skin_sigma = -2*pi*freq*epsilon0_const*imag(4+(32/(1+(j*2*pi*freq*0.000000000007234)^(1-0)))+(1100/(1+(j*2*pi*freq*0.000000032481)^(1-0.2)))+(0/(1+(j*2*pi*freq*0.000159155)^(1-0.2)))+(0/(1+(j*2*pi*freq*0.015915)^(1-0.2)))+(0.0002/(j*2*pi*freq*epsilon0_const)))
  Blood_epsilonr = real(4+(56/(1+(j*2*pi*freq*0.000000000008377)^(1-0.1)))+(5200/(1+(j*2*pi*freq*0.000000132629)^(1-0.1)))+(0/(1+(j*2*pi*freq*0.000159155)^(1-0.2)))+(0/(1+(j*2*pi*freq*0.015915)^(1-0)))+(0.7/(j*2*pi*freq*epsilon0_const)))
  Blood_sigma = -2*pi*freq*epsilon0_const*imag(4+(56/(1+(j*2*pi*freq*0.000000000008377)^(1-0.1)))+(5200/(1+(j*2*pi*freq*0.000000132629)^(1-0.1)))+(0/(1+(j*2*pi*freq*0.000159155)^(1-0.2)))+(0/(1+(j*2*pi*freq*0.015915)^(1-0)))+(0.7/(j*2*pi*freq*epsilon0_const)))
  c = 0
  Re = 2  // Bán kính điện cực
  n = 1  // Tỉ lệ hình học giữa hai điện cực thu
  b = 6  // Khoảng cách giữa hai điện cực
  L = 8*Re+2*b+n*b  // Tổng chiều dài vùng khảo sát
  E1 = E2-2*Re-b  // Vị trí điện cực 1
  E2 = 100-(( n/2)*b)-Re  // Vị trí điện cực 2
  E3 = 100+(( n/2)*b)+Re  // Vị trí điện cực 3
  E4 = E3+2*Re+b  // Vị trí điện cực 4
  Mix_epsilonr = real(3.625+(42/(1+(j*2*pi*freq*0.000000000008377)^(1-0.1)))+(3900/(1+(j*2*pi*freq*0.000000132629)^(1-0.1)))+(0.75/(1+(j*2*pi*freq*0.000000000007958)^(1-0.2)))+(6.25/(1+(j*2*pi*freq*0.000000015915)^(1-0.1)))+(1250/(1+(j*2*pi*freq*0.001591549)^(1-0.1)))+(500000/(1+(j*2*pi*freq*0.015915)^(1-0.1)))+(0.52525/(j*2*pi*freq*epsilon0_const)))  // 75 máu 25 tủy
  Mix_sigma = -2*pi*freq*epsilon0_const*imag(3.625+(42/(1+(j*2*pi*freq*0.000000000008377)^(1-0.1)))+(3900/(1+(j*2*pi*freq*0.000000132629)^(1-0.1)))+(0.75/(1+(j*2*pi*freq*0.000000000007958)^(1-0.2)))+(6.25/(1+(j*2*pi*freq*0.000000015915)^(1-0.1)))+(1250/(1+(j*2*pi*freq*0.001591549)^(1-0.1)))+(500000/(1+(j*2*pi*freq*0.015915)^(1-0.1)))+(0.52525/(j*2*pi*freq*epsilon0_const)))
  Mix_epsilonr_1 = real(3.25+(28/(1+(j*2*pi*freq*0.000000000008377)^(1-0.1)))+(2600/(1+(j*2*pi*freq*0.000000132629)^(1-0.1)))+(1.5/(1+(j*2*pi*freq*0.000000000007958)^(1-0.2)))+(12.5/(1+(j*2*pi*freq*0.000000015915)^(1-0.1)))+(2500/(1+(j*2*pi*freq*0.001591549)^(1-0.1)))+(1000000/(1+(j*2*pi*freq*0.015915)^(1-0.1)))+(0.3505/(j*2*pi*freq*epsilon0_const)))  // 50 máu 50 tủy
  Mix_sigma_1 = -2*pi*freq*epsilon0_const*imag(3.25+(28/(1+(j*2*pi*freq*0.000000000008377)^(1-0.1)))+(2600/(1+(j*2*pi*freq*0.000000132629)^(1-0.1)))+(1.5/(1+(j*2*pi*freq*0.000000000007958)^(1-0.2)))+(12.5/(1+(j*2*pi*freq*0.000000015915)^(1-0.1)))+(2500/(1+(j*2*pi*freq*0.001591549)^(1-0.1)))+(1000000/(1+(j*2*pi*freq*0.015915)^(1-0.1)))+(0.3505/(j*2*pi*freq*epsilon0_const)))
  Mix_epsilonr_2 = real(2.875+(14/(1+(j*2*pi*freq*0.000000000008377)^(1-0.1)))+(1300/(1+(j*2*pi*freq*0.000000132629)^(1-0.1)))+(2.25/(1+(j*2*pi*freq*0.000000000007958)^(1-0.2)))+(18.75/(1+(j*2*pi*freq*0.000000015915)^(1-0.1)))+(3750/(1+(j*2*pi*freq*0.001591549)^(1-0.1)))+(1500000/(1+(j*2*pi*freq*0.015915)^(1-0.1)))+(0.17575/(j*2*pi*freq*epsilon0_const)))  // 25 máu 75 tủy
  Mix_sigma_2 = -2*pi*freq*epsilon0_const*imag(2.875+(14/(1+(j*2*pi*freq*0.000000000008377)^(1-0.1)))+(1300/(1+(j*2*pi*freq*0.000000132629)^(1-0.1)))+(2.25/(1+(j*2*pi*freq*0.000000000007958)^(1-0.2)))+(18.75/(1+(j*2*pi*freq*0.000000015915)^(1-0.1)))+(3750/(1+(j*2*pi*freq*0.001591549)^(1-0.1)))+(1500000/(1+(j*2*pi*freq*0.015915)^(1-0.1)))+(0.17575/(j*2*pi*freq*epsilon0_const)))

Variables
  var1 "Variables 1"
    VID = (ec.normE/ec.normJ)*((ec.Jx+ec.Jy+ec.Jz)/((0.005[A])^2))
    Skin = intop1(VID)
    Fat = intop2(VID)
    Muscle = intop3(VID)
    Bone = intop4(VID)
    Marrow = intop5(VID)
    Blood = intop6(VID)
    All = intop7(VID)
    e1 = bnd1-bnd4
    z1 = bnd1/I
    z2 = bnd2/I
    z3 = bnd3/I
    z4 = bnd4/I
    Z1 = sqrt(real(z1)^2+imag(z1)^2)
    Z2 = sqrt(real(z2)^2+imag(z2)^2)
    Z3 = sqrt(real(z3)^2+imag(z3)^2)
    Z4 = sqrt(real(z4)^2+imag(z4)^2)

Selections
  sel1: Explicit on boundaries 75-77, 87, 88, 95
  sel2: Explicit on boundaries 78-80, 89, 90, 96
  sel3: Explicit on boundaries 81-83, 91, 92, 97
  sel4: Explicit on boundaries 84-86, 93, 94, 98

Couplings
  intop1: Integration on domains 1
  intop2: Integration on domains 2
  intop3: Integration on domains 3
  intop4: Integration on domains 4, 7, 8
  intop5: Integration on domains 5, 9-11
  intop6: Integration on domains 6
  intop7: Integration on all domains

Probes
  bnd1: Boundary "Boundary Probe 1" on boundaries 75-77, 87, 88, 95
    expr = V
    unit = m^4*kg/(s^3*A)
    descr = Electric potential
    frame = spatial
    table = tbl1
  bnd2: Boundary "Boundary Probe 2" on boundaries 78-80, 89, 90, 96
    expr = V
    unit = m^4*kg/(s^3*A)
    descr = Electric potential
    frame = spatial
    table = tbl1
  bnd3: Boundary "Boundary Probe 3" on boundaries 81-83, 91, 92, 97
    expr = V
    unit = m^4*kg/(s^3*A)
    descr = Electric potential
    frame = spatial
    table = tbl1
  bnd4: Boundary "Boundary Probe 4" on boundaries 84-86, 93, 94, 98
    expr = V
    unit = m^4*kg/(s^3*A)
    descr = Electric potential
    frame = spatial
    table = tbl1

Geometry
  geom1 "Geometry 1" (3D, length unit mm)
    cyl1: Cylinder | r = 60; h = 200
    cyl2: Cylinder | r = 58; h = 200
    cyl3: Cylinder | r = 45; h = 200; pos = {10, 0, 0}
    cyl4: Cylinder | r = 10; h = 200; pos = {39, 0, 0}
    cyl5: Cylinder | r = 5; h = 200; pos = {0, 20, 0}
    cyl6: Cylinder | r = 6; h = 200; pos = {39, 0, 0}
    cyl7: Cylinder | r = 3; h = 200; pos = {0, 20, 0}
    elp1: Ellipsoid | semiaxes = {15-2*c, 15-2*c, 30}; pos = {39, 0, 100}
    wp1: WorkPlane | quickz = 102.5-c; unite = on
    pard1: PartitionDomains | domain = cyl4(1) domains 1; workplane = wp1
    wp2: WorkPlane | quickz = 97.5+c; unite = on
    pard2: PartitionDomains | domain = pard1(1) domains 1; workplane = wp2
    del1: Delete "Delete Entities 1" | input = pard2(1) domains 2
    dif1: Difference | input = elp1; input2 = del1; keepsubtract = on
    rot1: Rotate | input = cyl1; rot = 10; indexattrtag = rot1.index
    cyl8: Cylinder | r = Re; h = 10; pos = {59.5, 0, E1}; axistype = x; rot = 90
    cyl9: Cylinder | r = Re; h = 10; pos = {59.5, 0, E2}; axistype = x; rot = 90
    cyl10: Cylinder | r = Re; h = 10; pos = {59.5, 0, E3}; axistype = x; rot = 90
    cyl11: Cylinder | r = Re; h = 10; pos = {59.5, 0, E4}; axistype = x; rot = 90
    dif2: Difference | input = cyl10, cyl11, cyl8, cyl9; input2 = rot1; keepsubtract = on
    fin: Finalize "Form Union"

Materials
  mat1: Common "Material 1" on domains 1
    def: def "Basic"
      relpermittivity = Skin_epsilonr
      electricconductivity = Skin_sigma
  mat2: Common "Material 2" on domains 2
    def: def "Basic"
      electricconductivity = Fat_sigma
      relpermittivity = Fat_epsilonr
  mat3: Common "Material 3" on domains 3
    def: def "Basic"
      electricconductivity = Muscle_sigma
      relpermittivity = Muscle_epsilonr
  mat4: Common "Material 4" on domains 4, 7, 8
    def: def "Basic"
      relpermittivity = BoneCortical_epsilonr
      electricconductivity = BoneCortical_sigma
  mat5: Common "Material 5" on domains 5, 9-11
    def: def "Basic"
      electricconductivity = BoneMarrow_sigma
      relpermittivity = BoneMarrow_epsilonr
  mat6: Common "Material 6" on domains 6
    def: def "Basic"
      relpermittivity = Blood_epsilonr
      electricconductivity = Blood_sigma
  mat7: Common "Copper" (disabled) on domains 12-15
    def: def "Basic"
      relpermeability = 1
      electricconductivity = 5.998e7[S/m]
      heatcapacity = 385[J/(kg*K)]
      relpermittivity = 1
      emissivity = 0.5
      density = 8940[kg/m^3]
      thermalconductivity = 400[W/(m*K)]
    Enu: Enu "Young's modulus and Poisson's ratio"
      E = 126e9[Pa]
      nu = 0.34
    linzRes: linzRes "Linearized resistivity"
      rho0 = 1.667e-8[ohm*m]
      alpha = 3.862e-3[1/K]
      Tref = 293.15[K]
  mat8: Common "Ag - Silver" (disabled) on domains 12-15
    def: def "Basic"
      electricconductivity = 61.6e6[S/m]
      thermalexpansioncoefficient = 18.9e-6[1/K]
      heatcapacity = 235[J/(kg*K)]
      density = 10500[kg/m^3]
      thermalconductivity = 429[W/(m*K)]
      relpermittivity = 1
    Enu: Enu "Young's modulus and Poisson's ratio"
      E = 83e9[Pa]
      nu = 0.37
  mat9: Common "Steel AISI 4340" on domains 12-15
    def: def "Basic"
      relpermeability = 1
      electricconductivity = 4.032e6[S/m]
      thermalexpansioncoefficient = 12.3e-6[1/K]
      heatcapacity = 475[J/(kg*K)]
      relpermittivity = 1
      density = 7850[kg/m^3]
      thermalconductivity = 44.5[W/(m*K)]
    Enu: Enu "Young's modulus and Poisson's ratio"
      E = 205[GPa]
      nu = 0.28

Physics
  ec: ConductiveMedia "Electric Currents" on all domains
    dependent variable V
    cucn1: CurrentConservationFluid "Current Conservation 1" (default)
    ein1: ElectricInsulation (default)
    init1: init "Initial Values 1" (default)
      V = 750 + (750*exp(-(((z-E1)^2)/(2*10^2))) - 750*exp(-(((z-E2)^2)/(2*10^2))))
    term1: Terminal on selection sel1 | I0 = 0.005
    gnd1: Ground on selection sel2

Mesh
  mesh1 "Mesh 1" (physics-controlled)
    size: MeshSizeDefault | hauto = 3

Studies
  std1 "Study 1"
    freq: Frequency "Frequency Domain" | plist = 10^{range(0,0.02,5)}

Solver configurations
  sol1 "Solution 1" (study std1)
    v1: Variables "Dependent Variables 1"
    s1: Stationary "Stationary Solver 1" | stol = 0.03; linpmethod = sol
      p1: Parametric | pname = freq; plistarr = 10^{range(0,0.02,5)}; punit = Hz; pcontinuationmode = no
      fc1: FullyCoupled | linsolver = dDef
      dDef: Direct

Datasets
  dset1: Solution | solution = sol1
  dset2: Solution "Probe Solution 2" | solution = sol1
  avh1: Average "Boundary Probe 1" on boundaries 75-77, 87, 88, 95 | data = dset2
  avh2: Average "Boundary Probe 2" on boundaries 78-80, 89, 90, 96 | data = dset2
  avh3: Average "Boundary Probe 3" on boundaries 81-83, 91, 92, 97 | data = dset2
  avh4: Average "Boundary Probe 4" on boundaries 84-86, 93, 94, 98 | data = dset2

Derived values
  pev1: EvalPoint "Boundary Probe 1" | data = avh1; table = tbl1; expr = V
  pev2: EvalPoint "Boundary Probe 2" | data = avh2; table = tbl1; expr = V
  pev3: EvalPoint "Boundary Probe 3" | data = avh3; table = tbl1; expr = V
  pev4: EvalPoint "Boundary Probe 4" | data = avh4; table = tbl1; expr = V

Plots
  pg1: PlotGroup1D "Probe Plot Group 1"
    tblp1: Table "Probe Table Graph 1" | table = tbl1
  pg2: PlotGroup3D "Electric Potential (ec)" | data = dset1
    vol1: Volume | expr = V
  pg3: PlotGroup3D "Electric Field Norm (ec)" | data = dset1
    mslc1: Multislice
      expr = ec.normE
      multiplanexmethod = coord
      xcoord = ec.CPx
      multiplaneymethod = coord
      ycoord = ec.CPy
      multiplanezmethod = coord
      zcoord = ec.CPz
    strmsl1: StreamlineMultislice
      expr = {ec.Ex, ec.Ey, ec.Ez}
      multiplanexmethod = coord
      xcoord = ec.CPx
      multiplaneymethod = coord
      ycoord = ec.CPy
      multiplanezmethod = coord
      zcoord = ec.CPz
      pointtype = interactivearrow
      arrowscale = 2.5E-4
      col1: Color "Color Expression 1" | expr = ec.normE
      filt1: Filter | expr = !isScalingSystemDomain
  pg4: PlotGroup1D "1D Plot Group 4" | data = dset1
    nyq1: Nyquist | expr = z4-z3