// COMSOL Multiphysics 6.4.0.429 model "LEG3D_Normal_Wenner_Sensitivity.mph"
// Outline of the model tree

Parameters
  I = 0.005[A]
  BoneMarrow_epsilonr = real(2.5+(3/(1+(j*2*pi*freq*0.000000000007958)^(1-0.2)))+(25/(1+(j*2*pi*freq*0.000000015915)^(1-0.1)))+(5000/(1+(j*2*pi*freq*0.001591549)^(1-0.1)))+(2000000/(1+(j*2*pi*freq*0.015915)^(1-0.1)))+(0.001/(j*2*pi*freq*epsilon0_const)))
  BoneMarrow_sigma = -2*pi*freq*epsilon0_const*imag(2.5+(3/(1+(j*2*pi*freq*0.000000000007958)^(1-0.2)))+(25/(1+(j*2*pi*freq*0.000000015915)^(1-0.1)))+(5000/(1+(j*2*pi*freq*0.001591549)^(1-0.1)))+(2000000/(1+(j*2*pi*freq*0.015915)^(1-0.1)))+(0.001/(j*2*pi*freq*epsilon0_const)))
  BoneCortical_epsilonr = real(2.5+(10/(1+(j*2*pi*freq*0.000000000013263)^(1-0.2)))+(180/(1+(j*2*pi*freq*0.000000079577)^(1-0.2)))+(5000/(1+(j*2*pi*freq*0.000159155)^(1-0.2)))+(100000/(1+(j*2*pi*freq*0.015915)^(1-0)))+(0.02/(j*2*pi*freq*epsilon0_const)))
  BoneCortical_sigma = -2*pi*freq*epsilon0_const*imag(2.5+(10/(1+(j*2*pi*freq*0.000000000013263)^(1-0.2)))+(180/(1+(j*2*pi*freq*0.000000079577)^(1-0.2)))+(5000/(1+(j*2*pi*freq*0.000159155)^(1-0.2)))+(100000/(1+(j*2*pi*freq*0.015915)^(1-0)))+(0.02/(j*2*pi*freq*epsilon0_const)))
  Muscle_epsilonr = real(4+(50/(1+(j*2*pi*freq*0.000000000007234)^(1-0.1)))+(7000/(1+(j*2*pi*freq*0.000000353678)^(1-0.1)))+(1200000/(1+(j*2*pi*freq*0.00031831)^(1-0.1)))+(25000000/(1+(j*2*pi*freq*0.002274)^(1-0)))+(0.2/(j*2*pi*freq*epsilon0_const)))
  Muscle_sigma = -2*pi*freq*epsilon0_const*imag(4+(50/(1+(j*2*pi*freq*0.000000000007234)^(1-0.1)))+(7000/(1+(j*2*pi*freq*0.000000353678)^(1-0.1)))+(1200000/(1+(j*2*pi*freq*0.00031831)^(1-0.1)))+(25000000/(1+(j*2*pi*freq*0.002274)^(1-0)))+(0.2/(j*2*pi*freq*epsilon0_const)))
  Fat_epsilonr = real(2.5+(3/(1+(j*2*pi*freq*0.000000000007958)^(1-0.2)))+(15/(1+(j*2*pi*freq*0.000000015915)^(1-0.1)))+(33000/(1+(j*2*pi*freq*0.000159155)^(1-0.05)))+(10000000/(1+(j*2*pi*freq*0.007958)^(1-0.01)))+(0.01/(j*2*pi*freq*epsilon0_const)))
  Fat_sigma = -2*pi*freq*epsilon0_const*imag(2.5+(3/(1+(j*2*pi*freq*0.000000000007958)^(1-0.2)))+(15/(1+(j*2*pi*freq*0.000000015915)^(1-0.1)))+(33000/(1+(j*2*pi*freq*0.000159155)^(1-0.05)))+(10000000/(1+(j*2*pi*freq*0.007958)^(1-0.01)))+(0.01/(j*2*pi*freq*epsilon0_const)))
  Skin_epsilonr = real(4+(32/(1+(j*2*pi*freq*0.000000000007234)^(1-0)))+(1100/(1+(j*2*pi*freq*0.000000032481)^(1-0.2)))+(0/(1+(j*2*pi*freq*0.000159155)^(1-0.2)))+(0/(1+(j*2*pi*freq*0.015915)^(1-0.2)))+(0.0002/(j*2*pi*freq*epsilon0_const)))
  Skin_sigma = -2*pi*freq*epsilon0_const*imag(4+(32/(1+(j*2*pi*freq*0.000000000007234)^(1-0)))+(1100/(1+(j*2*pi*freq*0.000000032481)^(1-0.2)))+(0/(1+(j*2*pi*freq*0.000159155)^(1-0.2)))+(0/(1+(j*2*pi*freq*0.015915)^(1-0.2)))+(0.0002/(j*2*pi*freq*epsilon0_const)))
  Blood_epsilonr = real(4+(56/(1+(j*2*pi*freq*0.000000000008377)^(1-0.1)))+(5200/(1+(j*2*pi*freq*0.000000132629)^(1-0.1)))+(0/(1+(j*2*pi*freq*0.000159155)^(1-0.2)))+(0/(1+(j*2*pi*freq*0.015915)^(1-0)))+(0.7/(j*2*pi*freq*epsilon0_const)))
  Blood_sigma = -2*pi*freq*epsilon0_const*imag(4+(56/(1+(j*2*pi*freq*0.000000000008377)^(1-0.1)))+(5200/(1+(j*2*pi*freq*0.000000132629)^(1-0.1)))+(0/(1+(j*2*pi*freq*0.000159155)^(1-0.2)))+(0/(1+(j*2*pi*freq*0.015915)^(1-0)))+(0.7/(j*2*pi*freq*epsilon0_const)))
  Mix_epsilonr = real(3.625+(42/(1+(j*2*pi*freq*0.000000000008377)^(1-0.1)))+(3900/(1+(j*2*pi*freq*0.000000132629)^(1-0.1)))+(0.75/(1+(j*2*pi*freq*0.000000000007958)^(1-0.2)))+(6.25/(1+(j*2*pi*freq*0.000000015915)^(1-0.1)))+(1250/(1+(j*2*pi*freq*0.001591549)^(1-0.1)))+(500000/(1+(j*2*pi*freq*0.015915)^(1-0.1)))+(0.52525/(j*2*pi*freq*epsilon0_const)))  // 75 máu 25 tủy
  Mix_sigma = -2*pi*freq*epsilon0_const*imag(3.625+(42/(1+(j*2*pi*freq*0.000000000008377)^(1-0.1)))+(3900/(1+(j*2*pi*freq*0.000000132629)^(1-0.1)))+(0.75/(1+(j*2*pi*freq*0.000000000007958)^(1-0.2)))+(6.25/(1+(j*2*pi*freq*0.000000015915)^(1-0.1)))+(1250/(1+(j*2*pi*freq*0.001591549)^(1-0.1)))+(500000/(1+(j*2*pi*freq*0.015915)^(1-0.1)))+(0.52525/(j*2*pi*freq*epsilon0_const)))
  Re = 2
  b = 3
  L = 8*Re+3*n*b
  E1 = 100-3*(L + n*b) / 8
  E2 = 100-(L + n*b) / 8
  E3 = 100+(L + n*b) / 8
  n = 2
  E4 = 100+3*(L + n*b) / 8
  Mix_epsilonr_1 = real(3.25+(28/(1+(j*2*pi*freq*0.000000000008377)^(1-0.1)))+(2600/(1+(j*2*pi*freq*0.000000132629)^(1-0.1)))+(1.5/(1+(j*2*pi*freq*0.000000000007958)^(1-0.2)))+(12.5/(1+(j*2*pi*freq*0.000000015915)^(1-0.1)))+(2500/(1+(j*2*pi*freq*0.001591549)^(1-0.1)))+(1000000/(1+(j*2*pi*freq*0.015915)^(1-0.1)))+(0.3505/(j*2*pi*freq*epsilon0_const)))  // 50 máu 50 tủy
  Mix_sigma_1 = -2*pi*freq*epsilon0_const*imag(3.25+(28/(1+(j*2*pi*freq*0.000000000008377)^(1-0.1)))+(2600/(1+(j*2*pi*freq*0.000000132629)^(1-0.1)))+(1.5/(1+(j*2*pi*freq*0.000000000007958)^(1-0.2)))+(12.5/(1+(j*2*pi*freq*0.000000015915)^(1-0.1)))+(2500/(1+(j*2*pi*freq*0.001591549)^(1-0.1)))+(1000000/(1+(j*2*pi*freq*0.015915)^(1-0.1)))+(0.3505/(j*2*pi*freq*epsilon0_const)))
  Mix_epsilonr_2 = real(2.875+(14/(1+(j*2*pi*freq*0.000000000008377)^(1-0.1)))+(1300/(1+(j*2*pi*freq*0.000000132629)^(1-0.1)))+(2.25/(1+(j*2*pi*freq*0.000000000007958)^(1-0.2)))+(18.75/(1+(j*2*pi*freq*0.000000015915)^(1-0.1)))+(3750/(1+(j*2*pi*freq*0.001591549)^(1-0.1)))+(1500000/(1+(j*2*pi*freq*0.015915)^(1-0.1)))+(0.17575/(j*2*pi*freq*epsilon0_const)))  // 25 máu 75 tủy
  Mix_sigma_2 = -2*pi*freq*epsilon0_const*imag(2.875+(14/(1+(j*2*pi*freq*0.000000000008377)^(1-0.1)))+(1300/(1+(j*2*pi*freq*0.000000132629)^(1-0.1)))+(2.25/(1+(j*2*pi*freq*0.000000000007958)^(1-0.2)))+(18.75/(1+(j*2*pi*freq*0.000000015915)^(1-0.1)))+(3750/(1+(j*2*pi*freq*0.001591549)^(1-0.1)))+(1500000/(1+(j*2*pi*freq*0.015915)^(1-0.1)))+(0.17575/(j*2*pi*freq*epsilon0_const)))

Variables
  var1 "Variables 1"
    VID = (ec.normE/ec.normJ)*((ec.Jx*ec2.Jx + ec.Jy*ec2.Jy + ec.Jz*ec2.Jz) / ((0.005[A])^2))
    Skin = intop1(VID)
    Fat = intop2(VID)
    Muscle = intop3(VID)
    Bone = intop4(VID)
    Marrow = intop5(VID)
    Mix = intop6(VID)
    All = intop7(VID)
    e1 = bnd1-bnd4
    z1 = bnd1/I
    z2 = bnd2/I
    z3 = bnd3/I
    z4 = bnd4/I
    Z1 = sqrt(real(z1)^2+imag(z1)^2)
    Z2 = sqrt(real(z2)^2+imag(z2)^2)
    Z3 = sqrt(real(z3)^2+imag(z3)^2)
    Z4 = sqrt(real(z4)^2+imag(z4)^2)
    S = (ec.Jx*ec2.Jx + ec.Jy*ec2.Jy + ec.Jz*ec2.Jz) / ((0.005[A])^2)

Selections
  sel1: Explicit on boundaries 43-45, 55, 56, 63
  sel2: Explicit on boundaries 46-48, 57, 58, 64
  sel3: Explicit on boundaries 49-51, 59, 60, 65
  sel4: Explicit on boundaries 52-54, 61, 62, 66

Couplings
  intop1: Integration on domains 1
  intop2: Integration on domains 2
  intop3: Integration on domains 3
  intop4: Integration on domains 4, 6
  intop5: Integration on domains 5, 7
  intop6: Integration (disabled) on no domains
  intop7: Integration on all domains

Probes
  bnd1: Boundary "Boundary Probe 1" on boundaries 43-45, 55, 56, 63
    expr = V
    unit = V
    descr = Electric potential
    frame = spatial
    table = tbl1
  bnd2: Boundary "Boundary Probe 2" on boundaries 46-48, 57, 58, 64
    expr = V
    unit = V
    descr = Electric potential
    frame = spatial
    table = tbl1
  bnd3: Boundary "Boundary Probe 3" on boundaries 49-51, 59, 60, 65
    expr = V
    unit = V
    descr = Electric potential
    frame = spatial
    table = tbl1
  bnd4: Boundary "Boundary Probe 4" on boundaries 52-54, 61, 62, 66
    expr = V
    unit = V
    descr = Electric potential
    frame = spatial
    table = tbl1

Geometry
  geom1 "Geometry 1" (3D, length unit mm)
    cyl1: Cylinder "Skin" | r = 60; h = 200
    cyl2: Cylinder "Fat" | r = 58; h = 200
    cyl3: Cylinder "Muscle" | r = 45; h = 200; pos = {10, 0, 0}
    cyl4: Cylinder "Bone 1" | r = 10; h = 200; pos = {39, 0, 0}
    cyl5: Cylinder "Bone 2" | r = 5; h = 200; pos = {0, 20, 0}
    cyl6: Cylinder "Marrow 1" | r = 6; h = 200; pos = {39, 0, 0}
    cyl7: Cylinder "Marrow 2" | r = 3; h = 200; pos = {0, 20, 0}
    elp1: Ellipsoid "Fracture" (disabled) | semiaxes = {15-2*0, 15-2*0, 30}; pos = {39, 0, 100}
    wp1: WorkPlane (disabled) | quickz = 102.5; unite = on
    pard1: PartitionDomains (disabled) | domain = cyl4(1) domains 1; workplane = wp1
    wp2: WorkPlane (disabled) | quickz = 97.5; unite = on
    pard2: PartitionDomains (disabled) | domain = pard1(1) domains 1; workplane = wp2
    rot1: Rotate | input = cyl1, cyl2; rot = 10; indexattrtag = rot1.index
    del1: Delete "Delete Entities 1" (disabled) | input = pard2(1) domains 2
    dif2: Difference (disabled) | input = elp1; input2 = del1; keepsubtract = on
    cyl8: Cylinder "Electrode 1" | r = Re; h = 10; pos = {59.5, 0, E1}; axistype = x; rot = 90
    cyl9: Cylinder "Electrode 2" | r = Re; h = 10; pos = {59.5, 0, E2}; axistype = x; rot = 90
    cyl10: Cylinder "Electrode 3" | r = Re; h = 10; pos = {59.5, 0, E3}; axistype = x; rot = 90
    cyl11: Cylinder "Electrode 4" | r = Re; h = 10; pos = {59.5, 0, E4}; axistype = x; rot = 90
    dif1: Difference | input = cyl10, cyl11, cyl8, cyl9; input2 = rot1(1); keepsubtract = on
    fin: Finalize "Form Union"

Materials
  mat1: Common "Skin" on domains 1
    def: def "Basic"
      electricconductivity = Skin_sigma
      relpermittivity = Skin_epsilonr
  mat2: Common "Fat" on domains 2
    def: def "Basic"
      relpermittivity = Fat_epsilonr
      electricconductivity = Fat_sigma
  mat3: Common "Muscle" on domains 3
    def: def "Basic"
      electricconductivity = Muscle_sigma
      relpermittivity = Muscle_epsilonr
  mat4: Common "Bone" on domains 4, 6
    def: def "Basic"
      electricconductivity = BoneCortical_sigma
      relpermittivity = BoneCortical_epsilonr
  mat5: Common "Marrow" on domains 5, 7
    def: def "Basic"
      electricconductivity = BoneMarrow_sigma
      relpermittivity = BoneMarrow_epsilonr
  mat6: Common "Fracture" (disabled) on no domains
    def: def "Basic"
      electricconductivity = Blood_sigma
      relpermittivity = Blood_epsilonr
  mat7: Common "Steel AISI 4340" on domains 8-11
    def: def "Basic"
      relpermeability = 1
      electricconductivity = 4.032e6[S/m]
      thermalexpansioncoefficient = 12.3e-6[1/K]
      heatcapacity = 475[J/(kg*K)]
      relpermittivity = 1
      density = 7850[kg/m^3]
      thermalconductivity = 44.5[W/(m*K)]
    Enu: Enu "Young's modulus and Poisson's ratio"
      E = 205[GPa]
      nu = 0.28

Physics
  ec: ConductiveMedia "Electric Currents" on all domains
    dependent variable V
    cucn1: CurrentConservationFluid "Current Conservation 1" (default)
    ein1: ElectricInsulation (default)
    init1: init "Initial Values 1" (default)
      V = 750 + (750*exp(-(((z-E1)^2)/(2*10^2))) - 750*exp(-(((z-E4)^2)/(2*10^2))))
    term1: Terminal on selection sel1 | I0 = 0.005
    gnd1: Ground on selection sel4
  ec2: ConductiveMedia "Electric Currents 2" on all domains
    dependent variable V2
    cucn1: CurrentConservationFluid "Current Conservation 1" (default)
    ein1: ElectricInsulation (default)
    init1: init "Initial Values 1" (default)
      V2 = 750 + (750*exp(-(((z-E1)^2)/(2*10^2))) - 750*exp(-(((z-E4)^2)/(2*10^2))))
    term1: Terminal on selection sel2 | I0 = 0.005
    gnd1: Ground on selection sel3

Mesh
  mesh1 "Mesh 1" (physics-controlled)
    size: MeshSizeDefault | hauto = 3

Studies
  std1 "Study 1"
    param: Parametric "Parametric Sweep" | pname = b; plistarr = 3
    freq: Frequency "Frequency Domain" | plist = 1000; solve for = {ec}
    freq2: Frequency "Frequency Domain 2" | plist = 1000; solve for = {ec2}

Solver configurations
  sol1 "Solution 1" (study std1)
    v1: Variables "Dependent Variables 1"
    s1: Stationary "Stationary Solver 1" | stol = 0.01; linpmethod = sol
      p1: Parametric | pname = freq; plistarr = 1000; punit = Hz; pcontinuationmode = no
      se1: Segregated
        ss1: SegregatedStep "Electric Currents" | segvar = {comp1_V, comp1_ec_term1_V0_ode}; linsolver = dDef
        ss2: SegregatedStep "Electric Currents 2" | segvar = {comp1_V2, comp1_ec2_term1_V0_ode}; linsolver = dDef
      dDef: Direct
    v2: Variables "Dependent Variables 2" | initmethod = sol; notsolmethod = sol
    s2: Stationary "Stationary Solver 2" | stol = 0.01; linpmethod = sol
      p1: Parametric | pname = freq; plistarr = 1000; punit = Hz; pcontinuationmode = no
      se1: Segregated
        ss1: SegregatedStep "Electric Currents" | segvar = {comp1_V, comp1_ec_term1_V0_ode}; linsolver = dDef
        ss2: SegregatedStep "Electric Currents 2" | segvar = {comp1_V2, comp1_ec2_term1_V0_ode}; linsolver = dDef
      dDef: Direct
  sol2 "Parametric Solutions 1" (study std1)

Datasets
  dset1: Solution | solution = sol1
  dset2: Solution "Probe Solution 2" | solution = sol1
  avh1: Average "Boundary Probe 1" on boundaries 43-45, 55, 56, 63 | data = dset2
  avh2: Average "Boundary Probe 2" on boundaries 46-48, 57, 58, 64 | data = dset2
  avh3: Average "Boundary Probe 3" on boundaries 49-51, 59, 60, 65 | data = dset2
  avh4: Average "Boundary Probe 4" on boundaries 52-54, 61, 62, 66 | data = dset2
  cpl1: CutPlane | data = dset1; quickplane = zx
  cln1: CutLine2D | data = cpl1; genpoints = {{100, 60}, {100, -60}}
  cln2: CutLine2D | data = cpl1; genpoints = {{0, 49}, {200, 49}}
  dset3: Solution | solution = sol2

Derived values
  pev1: EvalPoint "Boundary Probe 1" | data = avh1; table = tbl1; expr = V
  pev2: EvalPoint "Boundary Probe 2" | data = avh2; table = tbl1; expr = V
  pev3: EvalPoint "Boundary Probe 3" | data = avh3; table = tbl1; expr = V
  pev4: EvalPoint "Boundary Probe 4" | data = avh4; table = tbl1; expr = V

Plots
  pg1: PlotGroup1D "Probe Plot Group 1"
    tblp1: Table "Probe Table Graph 1" | table = tbl1
  pg2: PlotGroup3D "Electric Potential (ec)" | data = dset1
    vol1: Volume | expr = V
  pg3: PlotGroup3D "Electric Field Norm (ec)" | data = dset1
    mslc1: Multislice
      expr = ec.normE
      multiplanexmethod = coord
      xcoord = ec.CPx
      multiplaneymethod = coord
      ycoord = ec.CPy
      multiplanezmethod = coord
      zcoord = ec.CPz
    strmsl1: StreamlineMultislice
      expr = {ec.Ex, ec.Ey, ec.Ez}
      multiplanexmethod = coord
      xcoord = ec.CPx
      multiplaneymethod = coord
      ycoord = ec.CPy
      multiplanezmethod = coord
      zcoord = ec.CPz
      col1: Color "Color Expression 1" | expr = ec.normE
      filt1: Filter | expr = !isScalingSystemDomain
  pg4: PlotGroup3D "Electric Potential (ec2)" | data = dset1
    vol1: Volume | expr = V2
  pg5: PlotGroup3D "Electric Field Norm (ec2)" | data = dset1
    mslc1: Multislice
      expr = ec2.normE
      multiplanexmethod = coord
      xcoord = ec2.CPx
      multiplaneymethod = coord
      ycoord = ec2.CPy
      multiplanezmethod = coord
      zcoord = ec2.CPz
    strmsl1: StreamlineMultislice
      expr = {ec2.Ex, ec2.Ey, ec2.Ez}
      multiplanexmethod = coord
      xcoord = ec2.CPx
      multiplaneymethod = coord
      ycoord = ec2.CPy
      multiplanezmethod = coord
      zcoord = ec2.CPz
      col1: Color "Color Expression 1" | expr = ec2.normE
      filt1: Filter | expr = !isScalingSystemDomain
  pg6: PlotGroup2D "2D Plot Group 6" | data = cpl1
    surf1: Surface | expr = abs(S)
    line1: Line | data = cln1; expr = S
  pg7: PlotGroup1D "1D Plot Group 7" | data = cln1
    lngr1: LineGraph | expr = abs(S)
  pg8: PlotGroup1D "1D Plot Group 8" | data = dset1
    lngr1: LineGraph | data = cln2; expr = abs(S)
  pg9: PlotGroup3D "Electric Potential (ec) 1" | data = dset3
    vol1: Volume | expr = V
  pg10: PlotGroup3D "Electric Field Norm (ec) 1" | data = dset3
    mslc1: Multislice
      expr = ec.normE
      multiplanexmethod = coord
      xcoord = ec.CPx
      multiplaneymethod = coord
      ycoord = ec.CPy
      multiplanezmethod = coord
      zcoord = ec.CPz
    strmsl1: StreamlineMultislice
      expr = {ec.Ex, ec.Ey, ec.Ez}
      multiplanexmethod = coord
      xcoord = ec.CPx
      multiplaneymethod = coord
      ycoord = ec.CPy
      multiplanezmethod = coord
      zcoord = ec.CPz
      col1: Color "Color Expression 1" | expr = ec.normE
      filt1: Filter | expr = !isScalingSystemDomain
  pg11: PlotGroup3D "Electric Potential (ec2) 1" | data = dset3
    vol1: Volume | expr = V2
  pg12: PlotGroup3D "Electric Field Norm (ec2) 1" | data = dset3
    mslc1: Multislice
      expr = ec2.normE
      multiplanexmethod = coord
      xcoord = ec2.CPx
      multiplaneymethod = coord
      ycoord = ec2.CPy
      multiplanezmethod = coord
      zcoord = ec2.CPz
    strmsl1: StreamlineMultislice
      expr = {ec2.Ex, ec2.Ey, ec2.Ez}
      multiplanexmethod = coord
      xcoord = ec2.CPx
      multiplaneymethod = coord
      ycoord = ec2.CPy
      multiplanezmethod = coord
      zcoord = ec2.CPz
      col1: Color "Color Expression 1" | expr = ec2.normE
      filt1: Filter | expr = !isScalingSystemDomain

Exports
  data1: Data
    data = cln1
    expr = abs((realdot(ec.Jx, ec2.Jx) + realdot(ec.Jy, ec2.Jy) + realdot(ec.Jz, ec2.Jz)) / ((0.005[A])^2))
    filename = D:\Data_normal.csv
    location = regulargrid
    regulargridx1 = 10000
  data2: Data
    data = cpl1
    expr = abs(S)
    filename = D:\Sen.csv
    location = regulargrid
    regulargridx2 = 1000
    regulargridy2 = 1000